// COMSOL Multiphysics 5.4.0.225 model "zadatak_1.mph"
// Outline of the model tree

Geometry
  geom1 "Geometry 1" (2D, length unit m)
    c1: Circle | r = 0.5
    c2: Circle | r = 0.2
    c3: Circle | r = 0.1
    fin: Finalize "Form Union"

Materials
  mat1: Common "Material 1" on domains 1
    def "Basic"
      relpermittivity = 1
  mat2: Common "Material 2" on domains 2
    def "Basic"
      relpermittivity = 2.4
  mat3: Common "Material 3" on domains 3
    def "Basic"
      relpermittivity = 630

Physics
  es: Electrostatics on all domains
    dependent variable V
    ccn1: ChargeConservation (default)
    zc1: ZeroCharge (default)
    init1: init "Initial Values 1" (default)
    pot1: ElectricPotential on boundaries 5, 6, 9, 10 | V0 = 10000
    gnd1: Ground on boundaries 1-4, 7, 8, 11, 12

Mesh
  mesh1 "Mesh 1" (physics-controlled)

Studies
  std1 "Study 1"
    stat: Stationary

Solver configurations
  sol1 "Solution 1" (study std1)
    v1: Variables "Dependent Variables 1"
    s1: Stationary "Stationary Solver 1"
      dDef: Direct
      fc1: FullyCoupled | linsolver = dDef

Datasets
  dset1: Solution | solution = sol1
  cln1: CutLine2D | data = dset1; genpoints = {{0, 0}, {0.5, 0}}

Tables
  mm1: Table "Maximum and minimum values"
    // Max/min surface
    x | y | Electric field norm (V/m)
    0.46194 | 0.191342 | 0
    0 | 0.1 | 146994

Plots
  pg1: PlotGroup2D "Electric Potential (es)" | data = dset1
    surf1: Surface | expr = V
  pg2: PlotGroup2D "2D Plot Group 2" | data = dset1
    surf1: Surface | expr = es.normE; descr = Electric field norm
    mms1: MaxMinSurface | expr = es.normE; descr = Electric field norm; table = mm1
  pg3: PlotGroup1D "1D Plot Group 3" | data = dset1
    lngr1: LineGraph | data = cln1; expr = es.normE; descr = Electric field norm