// COMSOL Multiphysics 5.4.0.225 model "zadatak_3.mph"
// Outline of the model tree

Geometry
  geom1 "Geometry 1" (2D, length unit m)
    r1: Rectangle | size = {0.1, 1}
    r2: Rectangle | size = {0.9, 1}
    r3: Rectangle
    r4: Rectangle | pos = {-7, -4}; size = {15, 10}
    r5: Rectangle | pos = {0.8, 0}; size = {0.1, 1}
    fin: Finalize "Form Union"

Materials
  mat1: Common "Material 1" on domains 1, 4
    def "Basic"
      relpermittivity = 1
  mat2: Common "Material 2" on domains 3
    def "Basic"
      relpermittivity = 2.4
  mat3: Common "Copper" on no domains
    def "Basic"
      relpermeability = 1
      electricconductivity = 5.998e7[S/m]
      heatcapacity = 385[J/(kg*K)]
      relpermittivity = 1
      emissivity = 0.5
      density = 8940[kg/m^3]
      thermalconductivity = 400[W/(m*K)]
    Enu "Young's modulus and Poisson's ratio"
      youngsmodulus = 126e9[Pa]
      poissonsratio = 0.34
    linzRes "Linearized resistivity"
      rho0 = 1.667e-8[ohm*m]
      alpha = 3.862e-3[1/K]
      Tref = 293.15[K]
  mat4: Common "Material 4" on domains 2, 5
    def "Basic"
      relpermittivity = 630

Physics
  es: Electrostatics on all domains
    dependent variable V
    ccn1: ChargeConservation (default)
    zc1: ZeroCharge (default)
    init1: init "Initial Values 1" (default)
    pot1: ElectricPotential on boundaries 4-7 | V0 = 10000
    gnd1: Ground on boundaries 13-16

Mesh
  mesh1 "Mesh 1" (physics-controlled)

Studies
  std1 "Study 1"
    stat: Stationary

Solver configurations
  sol1 "Solution 1" (study std1)
    v1: Variables "Dependent Variables 1"
    s1: Stationary "Stationary Solver 1"
      dDef: Direct
      fc1: FullyCoupled | linsolver = dDef

Datasets
  dset1: Solution | solution = sol1
  cln1: CutLine2D | data = dset1; genpoints = {{0, 0.5}, {1, 0.5}}
  cln2: CutLine2D | data = dset1; genpoints = {{0.1, 0.5}, {0.8, 0.5}}
  cln3: CutLine2D | data = dset1; genpoints = {{0.8, 0.5}, {0.9, 0.5}}

Derived values
  av1: AvLine "Line Average 1" | data = cln2; table = tbl1; expr = es.normE; unit = V/m; descr = Electric field norm
  av2: AvLine "Line Average 2" | data = cln3; table = tbl2; expr = es.normE; unit = V/m; descr = Electric field norm

Tables
  tbl1: Table
    // Line Average 1 (es.normE)
    Electric field norm (V/m)
    12500
  tbl2: Table
    // Line Average 2 ()
    Electric field norm (V/m)
    25207.9

Plots
  pg1: PlotGroup2D "Electric Potential (es)" | data = dset1
    surf1: Surface | expr = V
  pg2: PlotGroup2D "2D Plot Group 2" | data = dset1
    surf1: Surface | expr = es.normE; descr = Electric field norm
    arws1: ArrowSurface | expr = {es.Ex, es.Ey}; xnumber = 40; ynumber = 40
  pg3: PlotGroup1D "1D Plot Group 3" | data = dset1
    lngr1: LineGraph | data = cln1; expr = es.normE; descr = Electric field norm
    lngr2: LineGraph | data = cln2; expr = es.normE; descr = Electric field norm
    lngr3: LineGraph | data = cln3; expr = es.normE; descr = Electric field norm